W := watt/m^2*1400
N1 := watt*75
N2 := watt*200
T1 := K*(20 + 273)
T2 := K*(30 + 273)
G := watt/(m^2*K^4)*5.67*10^-8
S1 := (N2*T1^4 - N1*T2^4)/(W*(T2^4 - T1^4)) = 0.5679 m^2
S2 := (W*(N1 - N2) - G*(N2*T1^4 - N1*T2^4))/(G*W*(T2^4 - T1^4)) = -2.64997 m^2
